// SBML level 3 version 2
// Created with https://github.com/matthiaskoenig/sbmlutils.

model model2()
  // Model 2

  // Compartments:
  compartment Vgut = 1; Vgut is "gut compartment";
  compartment Vperi = 1; Vperi is "peripheral compartment";
  compartment Vcent = 1; Vcent is "central compartment";

  // Species:
  // handled in amount not concentration
  species y_gut in Vgut = 1/Vgut;
  species y_cent in Vcent = 0; y_cent is "y central";
  species y_peri in Vperi = 0; y_peri is "y peripheral";

  // Parameters:
  k = 1;
  CL = 1;
  Q = 1;

  // Reactions:
  // absorption from gut
  ABSORPTION: y_gut => y_cent; -k*y_gut; ABSORPTION is "absorption";
  // clearance from central compartment
  CLEARANCE: y_cent => ; -CL*y_cent; CLEARANCE is "clearance";
  // distribution in peripheral compartment
  R1: y_cent => y_peri; Q*y_cent;
  // distribution from peripheral compartment
  R2: y_peri => y_cent; Q*y_peri;
end
