// SBML level 3 version 2
// Created with https://github.com/matthiaskoenig/sbmlutils.

model simple_chain()
  // Model Simple Chain
  // Simple S1 -> S2 conversion for testing.
  // model units - substance: mole, time: second, volume: m3, area: m2, length: metre, extent: mole

  // Compartments:
  compartment liver = 1 m3;

  // Species:
  species S1 in liver = 1;
  species S2 in liver = 0;

  // Parameters:
  k1 = 1 m3_per_s;

  // Reactions:
  // dS1 /dt = - k1 * S1 dS2 /dt = + k1 * S1
  R1: S1 => S2; k1*S1;

  // Unit definitions:
  unit m2 = metre^2; m2 is "meter^2";
  unit m3 = metre^3; m3 is "meter^3";
  unit m3_per_s = metre^3 / second; m3_per_s is "meter^3/s";
  unit mole_per_m3 = mole / metre^3; mole_per_m3 is "mole/m^3";
  unit mole_per_s = mole / second; mole_per_s is "mole/s";
end
