// SBML level 3 version 2
// Created with https://github.com/matthiaskoenig/sbmlutils.

model simple_chain()
  // Model Simple Chain
  // Simple S1 -> S2 conversion for testing. ## Terms of use The content of this model has been carefully created in a manual research effort. This file has been created by Matthias König using sbmlutils. For questions contact koenigmx@hu-berlin.de. Copyright © 2026 Matthias König.
  // <a rel="license" href="http://creativecommons.org/licenses/by/4.0/">
  // <img alt="Creative Commons License" style="border-width:0"
  // src="https://i.creativecommons.org/l/by/4.0/88x31.png"
  // /></a><br />This work is licensed under a <a
  // rel="license" href="http://creativecommons.org/licenses/by/4.0/">Creative
  // Commons Attribution 4.0 International License</a>.
  // Redistribution and use of any part of this model, with or
  // without modification,
  // are permitted provided that the following conditions are met:
  // 1. Redistributions of this SBML file must retain the above
  // copyright notice, this
  // list of conditions and the following disclaimer.
  // 2. Redistributions in a different form must reproduce the above
  // copyright notice,
  // this list of conditions and the following disclaimer in the
  // documentation and/or
  // other materials provided with the distribution.
  // This model is distributed in the hope that it will be useful,
  // but WITHOUT ANY
  // WARRANTY; without even the implied warranty of MERCHANTABILITY
  // or FITNESS
  // FOR A PARTICULAR PURPOSE.

  // Compartments:
  compartment liver = 1;

  // Species:
  species S1 in liver = 1;
  species S2 in liver = 0;

  // Parameters:
  k1 = 1;

  // Reactions:
  // dS1 /dt = - k1 * S1 dS2 /dt = + k1 * S1
  R1: S1 => S2; k1*S1;
end
