// SBML level 3 version 2
// Created with https://github.com/matthiaskoenig/sbmlutils.

model simple_pk()
  // Simple PK model
  // Model of absorption and distribution of substance y.
  // Terms of use
  // The content of this model has been carefully created in a manual research effort. This file has been created by Matthias König using sbmlutils. For questions contact koenigmx@hu-berlin.de. Copyright © 2026 Matthias König.
  // This work is licensed under a Creative Commons Attribution 4.0 International License.
  // Redistribution and use of any part of this model, with or without modification, are permitted provided that the following conditions are met:
  // Redistributions of this SBML file must retain the above copyright notice, this list of conditions and the following disclaimer.
  // Redistributions in a different form must reproduce the above copyright notice, this list of conditions and the following disclaimer in the documentation and/or other materials provided with the distribution.
  // This model is distributed in the hope that it will be useful, but WITHOUT ANY WARRANTY; without even the implied warranty of MERCHANTABILITY or FITNESS FOR A PARTICULAR PURPOSE.
  // model units - substance: mmole, time: min, volume: litre, area: m2, length: metre, extent: mmole

  // Compartments:
  compartment Vgut = 1 litre; Vgut is "gut compartment";  // SBO:0000290
  compartment Vperi = 1 litre; Vperi is "peripheral compartment";  // SBO:0000290
  compartment Vcent = 1 litre; Vcent is "central compartment";  // SBO:0000290

  // Species:
  // handled in amount not concentration
  species y_gut in Vgut = 1/Vgut;  // SBO:0000247
  species y_cent in Vcent = 0; y_cent is "y central";  // SBO:0000247
  species y_peri in Vperi = 0; y_peri is "y peripheral";  // SBO:0000247

  // Parameters:
  k_abs = 1 l_per_min; k_abs is "absorption rate";  // SBO:0000009
  CL = 1 l_per_min; CL is "clearance";  // SBO:0000009
  Q = 1 l_per_min; Q is "distribution Q";  // SBO:0000009

  // Reactions:
  // [mmole/min] absorption from gut
  ABSORPTION: y_gut => y_cent; k_abs*y_gut; ABSORPTION is "absorption";  // SBO:0000176
  // [mmole/min] clearance from central compartment
  CLEARANCE: y_cent => ; CL*y_cent; CLEARANCE is "clearance";  // SBO:0000176
  // [mmole/min] distribution in peripheral compartment
  transport_peripheral_R1: y_cent => y_peri; Q*y_cent; transport_peripheral_R1 is "transport peripheral (R1)";  // SBO:0000176
  // [mmole/min] distribution from peripheral compartment
  transport_central_R2: y_peri => y_cent; Q*y_peri; transport_central_R2 is "transport central (R2)";  // SBO:0000176

  // Unit definitions:
  unit g_per_mole = gram / mole; g_per_mole is "g/mole";
  unit l_per_min = litre / (60 second); l_per_min is "l/min";
  unit l_per_min_mmole = litre / (60 second * 1e-3 mole); l_per_min_mmole is "l/min/mmole";
  unit m2 = metre^2; m2 is "meter^2";
  unit mM = 1e-3 mole / litre; mM is "mmole/liter";
  unit mg = 1e-3 gram;
  unit min = 60 second;
  unit mmole = 1e-3 mole;
  unit mmole_per_min = 1e-3 mole / (60 second); mmole_per_min is "mmole/min";
  unit mmole_per_min_l = 1e-3 mole / (60 second * litre); mmole_per_min_l is "mmole/min/liter";
  unit per_min = 1 / (60 second); per_min is "1/min";
  unit per_min_l = 1 / (60 second * litre); per_min_l is "1/min/liter";
end
